# OpenSim document version 20303
Model pendulum:
  publications: Annals of Biomedical Engineering, vol 33, pp 829–840, 2005
  length_units: meters
  force_units: N
  gravity: 0 -9.8066 0
  credits:
    The OpenSim Development Team (Reinbolt, J; Seth, A; Habib, A; Hamner, S) adapted from a model originally created by Kate Holzbaur (11/22/04)
    License:
    Creative Commons (CCBY 3.0). You are free to distribute, remix, tweak, and build upon this work, even commercially,
    as long as you credit us for the original creation.
    http://creativecommons.org/licenses/by/3.0/
  BodySet:
    Body ground: mass=0 mass_center=(0 0 0) inertia_xx=0 inertia_yy=0 inertia_zz=0
    Body rod1: mass=1 mass_center=(0 0 0) inertia_xx=0 inertia_yy=0 inertia_zz=0 meshes=(cylinder.vtp sphere.vtp)
      PinJoint pin1: parent_body=ground location_in_parent=(0 0 0) location=(0 0.5 0)
        Coordinate q1: motion_type=rotational default_value=3.141593 range=(1.570796 4.712389) clamped=false
  ForceSet:
    Thelen2003Muscle m1: min_control=0 max_control=1 optimal_force=1 max_isometric_force=2000 optimal_fiber_length=0.07
        tendon_slack_length=0.08 pennation_angle_at_optimal=0.2 [radians] max_contraction_velocity=10
        activation_time_constant=0.01 deactivation_time_constant=0.04 FmaxTendonStrain=0.033 FmaxMuscleStrain=0.6
        KshapeActive=0.5 KshapePassive=4 Af=0.3 Flen=1.8
      PathPoint m1P1: ground (0.1 0 0)
      PathPoint m1P2: rod1 (0 0.4 0)
    Thelen2003Muscle m2: min_control=0 max_control=1 optimal_force=1 max_isometric_force=2000 optimal_fiber_length=0.07
        tendon_slack_length=0.08 pennation_angle_at_optimal=0.2 max_contraction_velocity=10
        activation_time_constant=0.01 deactivation_time_constant=0.04 FmaxTendonStrain=0.033 FmaxMuscleStrain=0.6
        KshapeActive=0.5 KshapePassive=4 Af=0.3 Flen=1.8
      PathPoint m2P1: ground (-0.1 0 0)
      PathPoint m2P2: rod1 (0 0.4 0)
